// SBML level 3 version 2

function f_BW(age, BW_birth)
  BW_birth + 4.47*age - 0.093*age^2 + 0.00061*age^3;
end

model PBK_PFAS_Recetox_2026()
  // model units - substance: MicroGM, time: DAY, volume: L, extent: MicroGM

  // Compartments:
  compartment Alv;
  compartment Lung; Lung has L; Lung is "lung";
  compartment SkinSc;
  compartment SkinTrans;
  compartment SkinVe;
  compartment Skin; Skin has L; Skin is "skin";
  compartment Ven_Plas; Ven_Plas has L; Ven_Plas is "venous blood";
  compartment Art_Plas; Art_Plas has L; Art_Plas is "arterial blood";
  compartment Gut; Gut has L; Gut is "gut";
  compartment Liv; Liv has L; Liv is "liver";
  compartment Fat; Fat has L; Fat is "adipose tissue";
  compartment Kid; Kid has L; Kid is "kidney";
  compartment Fil; Fil has L; Fil is "filtrate";
  compartment Rest; Rest has L; Rest is "rest-of-body";
  compartment Delay = 1 L; Delay is "storage compartment of urine";
  compartment Urine = 1 L; Urine is "urine";
  compartment Menstruation = 1;
  compartment Faeces = 1;

  // Species:
  substanceOnly species Aalv in Alv = 0;
  substanceOnly species Alung in Lung = 0; Alung is "quantity in lung";
  substanceOnly species Asc in SkinSc = 0;
  substanceOnly species Atrans in SkinTrans = 0;
  substanceOnly species Ave in SkinVe = 0;
  substanceOnly species ASk in Skin = 0; ASk is "quantity in skin";
  substanceOnly species AVen_Plas in Ven_Plas = 0; AVen_Plas is "quantity in venous blood plasma";
  substanceOnly species AArt_Plas in Art_Plas = 0; AArt_Plas is "quantity in arterial blood plasma";
  substanceOnly species AGut in Gut = 0; AGut is "quantity in gut";
  substanceOnly species ALiv in Liv = 0; ALiv is "quantity in liver";
  substanceOnly species AFat in Fat = 0; AFat is "quantity in fat";
  substanceOnly species AKid in Kid = 0; AKid is "quantity in kidney";
  substanceOnly species AFil in Fil = 0; AFil is "quantity in filtrate";
  substanceOnly species ADelay in Delay = 0; ADelay is "quantity in delay";
  substanceOnly species AUrine in Urine = 0; AUrine is "quantity in urine";
  substanceOnly species ARest in Rest = 0; ARest is "quantity in rest-of-body";
  substanceOnly species AMenstruation in Menstruation = 0;
  substanceOnly species AFaeces in Faeces = 0;

  // Parameters:
  AgeRef = 0 YR; AgeRef is "current age of reference indvididual in simulation";
  Age = 0 YR; Age is "age during simulation";
  Sex = 1;
  BWRef = 3.68 KiloGM; BWRef is "body weight of reference indvididual in simulation";
  BWBirth = 3.68 KiloGM; BWBirth is "population nominal body weight at birth";
  Height = 1.76;
  deltaBW has UNITLESS; deltaBW is "relative body weight of reference individual compared to population nominal body weight";
  BW has KiloGM; BW is "body weight";
  SDB = 1;
  SDAdi = 1;
  BSA has CentiM2; BSA is "total area of the skin";
  HR = 72;
  SDLun = 1;
  SDK = 1;
  SDInt = 1;
  SDL = 1;
  SDSk = 1;
  rhoLun = 1.048;
  rhoK = 1.05;
  rhoInt = 1.042;
  rhoL = 1.0505;
  rhoSk = 1.5;
  rhoB = 1.06;
  rhoAdi = 0.916;
  FBW = 0.84 L_PER_KiloGM; FBW is "Fraction of the BW covered by the sum of the compartments";
  VPlasC = 0.0428 L_PER_KiloGM; VPlasC is "fraction plasma volume";
  VartC = 0.39 UNITLESS; VartC is "fraction arterial plasma volume";
  VvenC = 0.61 UNITLESS; VvenC is "fraction venous plasma volume";
  Htc = 0.44 UNITLESS; Htc is "hematocrit";
  QfilC = 0.2 UNITLESS; QfilC is "fraction of kidney plasma flow to filtrate";
  SkinThickness = 0.1 CentiM; SkinThickness is "skin thickness";
  FSkinExposed = 0.05 UNITLESS; FSkinExposed is "fraction of skin exposed";
  fss = 0.6;
  hsc = 0.001;
  hve = 0.0001;
  Kpcell = 0.01;
  ffatsc = 0.02;
  ffatve = 0.02;
  ffatepi = 0.05;
  ffatbl = 0.01;
  Kpsc = 0.01;
  Kpve = 0.001;
  MW = 414.07 GM_PER_MOL; MW is "molar weight";
  logP = 4.81 UNITLESS;
  VP = 2.34 PA; VP is "vapor pressure";
  Tmc = 144000 MicroGM_PER_DAY_PER_KiloGM0P75; Tmc is "maximum resorption rate";
  Kt = 55 MicroGM_PER_L; Kt is "resorption affinity";
  Free = 0.02 UNITLESS; Free is "free fraction in plasma";
  PL = 2.2 UNITLESS; PL is "partition coefficient liver/plasma";
  PF = 0.04 UNITLESS; PF is "partition coefficient fat/plasma";
  PK = 1.05 UNITLESS; PK is "partition coefficient kidney/plasma";
  PSk = 0.1 UNITLESS; PSk is "partition coefficient skin/plasma";
  PR = 0.12 UNITLESS; PR is "partition coefficient rest-of-body/plasma";
  PG = 0.05 UNITLESS; PG is "partition coefficient gut/plasma";
  PLun = 1.27 UNITLESS; PLun is "partition coefficient lung/plasma";
  PT = 1;
  Ratio = 0.5;
  MFV = 0.5;
  age_start_menstruation = 12;
  age_stop_menstruation = 50;
  Tm has MicroGM_PER_DAY; Tm is "transporter maximum";
  FreeL has UNITLESS; FreeL is "free fraction of chemical in liver";
  FreeF has UNITLESS; FreeF is "free fraction of chemical in fat";
  FreeK has UNITLESS; FreeK is "free fraction of chemical in kidney";
  FreeSk has UNITLESS; FreeSk is "free fraction of chemical in skin";
  FreeR has UNITLESS; FreeR is "free fraction of chemical in rest of body";
  FreeG has UNITLESS; FreeG is "free fraction of chemical in gut";
  FreeLun has UNITLESS; FreeLun is "free fraction of chemical in lung";
  QC has L_PER_DAY; QC is "cardiac output adjusted for body weight";
  QCP has L_PER_DAY; QCP is "cardiac output adjusted for plasma flow";
  QL has L_PER_DAY; QL is "scaled plasma flow to liver";
  QF has L_PER_DAY; QF is "scaled plasma flow to fat";
  QK has L_PER_DAY; QK is "scaled plasma flow to kidney";
  Qfil has L_PER_DAY; Qfil is "plasma flow to filtrate compartment";
  QG has L_PER_DAY; QG is "scaled plasma flow to gut";
  QSk has L_PER_DAY; QSk is "scaled plasma flow to the skin";
  QR has L_PER_DAY; QR is "plasma flow to the rest of the body";
  CLfaecesc = 0.1;
  kurinec = 0.0072 PER_DAY_KiloGM0P25; kurinec is "urinary elimination rate constant";
  kurine has PER_DAY; kurine is "urinary elimination rate constant";

  // Assignment rules:
  Alv := 0.03*BW;
  Lung := VLun;
  SkinSc := Vsc;
  SkinTrans := 1;
  SkinVe := Vve;
  Skin := VSk;
  Ven_Plas := VvenC*VPlasC*BW;
  Art_Plas := VartC*VPlasC*BW;
  Gut := VInt;
  Liv := VL;
  Fat := VAdi;
  Kid := VK;
  Fil := VK*0.1;
  Rest := FBW*BW - VLun - VK - VInt - VL - VSk - VAdi - VK*0.1 - VPlasC*BW;
  deltaBW := BWRef/f_BW(AgeRef, BWBirth);
  BW := deltaBW*f_BW(Age, BWBirth);
  mB := piecewise((3.33*BSA - 0.81)*SDB, Sex == 0, (2.66*BSA - 0.46)*SDB);
  BSA := 0.007184*BW^0.425*(100*Height)^0.725;
  BMI := BW/Height^2;
  EDV := 43.13 + 12.96*mB;
  EF := 0.65 - 0.0018*BMI;
  mAdi_male_0_1 := (0.9084 + 0.706*BW + 5.3*Height - 3.057*0.365*Age)/100*BW;
  mAdi_female_0_1 := (0.9084 + 0.706*BW + 5.3*Height + 0.3585 - 3.057*0.365*Age)/100*BW;
  mAdi_male_4_15 := (1.51*BMI - 0.7*Age - 3.6 + 1.4)/100*BW;
  mAdi_female_4_15 := (1.51*BMI - 0.7*Age + 1.4)/100*BW;
  mAdi_male_18_99 := (1.2*BMI + 0.23*Age - 10.8 - 5.4)/100*BW;
  mAdi_female_18_99 := (1.2*BMI + 0.23*Age - 5.4)/100*BW;
  mAdi_0_1 := piecewise(mAdi_male_0_1, Sex == 0, mAdi_female_0_1);
  mAdi_4_15 := piecewise(mAdi_male_4_15, Sex == 0, mAdi_female_4_15);
  mAdi_18_99 := piecewise(mAdi_male_18_99, Sex == 0, mAdi_female_18_99);
  mAdi := piecewise(mAdi_0_1*SDAdi, Age < 1, piecewise(mAdi_4_15*SDAdi, Age < 15, piecewise(mAdi_18_99*SDAdi, Age < 99, mAdi_18_99*SDAdi)));
  mLun := exp(2.1*ln(Height) - 2.092)*SDLun;
  mK := exp(1.93*ln(Height) - 2.306)*SDK;
  mInt := exp(2.47*ln(Height) - 1.351)*SDInt;
  mL := exp(1.98*ln(Height) - 0.6786)*SDL;
  mSk := exp(1.64*BSA - 1.93)*SDSk;
  VLun := mLun/rhoLun;
  VK := mK/rhoK;
  VInt := mInt/rhoInt;
  VL := mL/rhoL;
  VSk := mSk/rhoSk;
  VB := mB/rhoB;
  VAdi := mAdi/rhoAdi;
  Tm := Tmc*BW^0.75;
  FreeL := Free/PL;
  FreeF := Free/PF;
  FreeK := Free/PK;
  FreeSk := Free/PSk;
  FreeR := Free/PR;
  FreeG := Free/PG;
  FreeLun := Free/PLun;
  QC := HR*EDV*EF/1000*60*24;
  QCP := QC*(1 - Htc);
  QL := (25.53 + 1.3*Sex)/100*QCP;
  QF := exp(2.5 - 0.043*BMI + 0.033*mAdi)/100*QCP;
  QK := (20.57 - 1.76*Sex)/100*QCP;
  Qfil := QfilC*QK;
  QG := (18.52 + 3.04*Sex - (0.2 + 0.06*Sex)*BMI + (0.0009 + 0.0004*Sex)*BMI^2)/100*QCP;
  QSk := (5.68 - 0.034*BMI)/100*QCP;
  QR := QCP - QL - QF - QK - QG - QSk;
  Qp := ((1400 - 190)*Age^2.5/(Age^2.5 + 50) + 190)*24;
  Pab := 1/10^(6.96 - 1.04*log10(VP) - 0.533*logP - 0.00495*MW);
  Kscve := (1 - ffatve + ffatve*10^logP)/(1 - ffatsc + ffatsc*10^logP);
  Kver := (1 - ffatbl + ffatbl*10^logP)/(1 - ffatepi + ffatepi*10^logP);
  SkinArea := fss*BSA;
  Vsc := SkinArea*hsc/1000;
  Vve := SkinArea*hve/1000;
  CLcell := 24*Kpcell*fss*BSA/1000;
  CLsc := 24*Kpsc*fss*BSA/1000;
  CLve := 24*Kpve*fss*BSA/1000;
  CLmenstruation := piecewise(MFV*0.5*(1 - Htc) + MFV*0.5, (Sex == 1) && (Age >= age_start_menstruation) && (Age <= age_stop_menstruation), 0);
  CLfaeces := CLfaecesc*BW;
  kurine := kurinec*BW^(-0.25);

  // Rate rules:
  Age' = 1/365;

  // Reactions:
  _J0: Aalv -> Alung; Qp*Pab*(Aalv/Alv);
  _J1: Alung -> AArt_Plas; QCP*Free*(Alung/Lung);
  _J2: Asc -> Atrans; 2*CLsc*(Asc/Vsc);
  _J3: Atrans -> Ave; 2*CLsc*(Asc/Vsc) - 2*CLve*(Atrans/Vsc)/Kscve + 2*CLve*(Ave/Vve);  // modifiers: Asc
  _J4: Ave -> ASk; 2*CLve*(Atrans/Vsc)/Kscve - 2*CLve*(Ave/Vve) - CLcell*(Ave/Vve)/Kver;  // modifiers: Atrans
  _J5: ASk -> AVen_Plas; CLcell*(Ave/Vve)/Kver + QSk*FreeSk*(ASk/Skin);  // modifiers: Ave
  _J6: AArt_Plas -> AGut; QG*Free*(AArt_Plas/Art_Plas);
  _J7: AArt_Plas -> ALiv; QL*Free*(AArt_Plas/Art_Plas);
  _J8: AArt_Plas -> AFat; QF*Free*(AArt_Plas/Art_Plas);
  _J9: AArt_Plas -> AKid; QK*Free*(AArt_Plas/Art_Plas);
  _J10: AArt_Plas -> AFil; Qfil*Free*(AArt_Plas/Art_Plas);
  _J11: AArt_Plas -> ARest; QR*Free*(AArt_Plas/Art_Plas);
  _J12: AArt_Plas -> AMenstruation; CLmenstruation*Free*(AArt_Plas/Art_Plas);
  _J13: AArt_Plas -> AFaeces; CLfaeces*Free*(AArt_Plas/Art_Plas);
  _J14: AGut -> ALiv; QG*FreeG*(AGut/Gut);
  _J15: AFil -> AKid; Tm*(AFil/Fil)/(Kt + AFil/Fil);
  _J16: AFil -> ADelay; Qfil*(AFil/Fil);
  _J17: ADelay -> AUrine; kurine*ADelay;
  _J18: ALiv -> AVen_Plas; (QL + QG)*FreeL*(ALiv/Liv);
  _J19: AFat -> AVen_Plas; QF*FreeF*(AFat/Fat);
  _J20: AKid -> AVen_Plas; QK*FreeK*(AKid/Kid);
  _J21: ARest -> AVen_Plas; QR*FreeR*(ARest/Rest);

  // Unit definitions:
  unit MicroGM = 1e-6 gram;
  unit DAY = 86400 second;
  unit L = litre;
  unit YR = 3.15576e7 second;
  unit KiloGM = 1000 gram;
  unit UNITLESS = dimensionless;
  unit L_PER_KiloGM = litre / (1000 gram);
  unit CentiM2 = (0.01 metre)^2;
  unit CentiM = 0.01 metre;
  unit GM_PER_MOL = gram / mole;
  unit PA = 1000 gram / (metre * second^2);
  unit MicroGM_PER_DAY_PER_KiloGM0P75 = 1e-6 gram / (86400 second * (1000 gram)^0.75);
  unit MicroGM_PER_L = 1e-6 gram / litre;
  unit PER_DAY_KiloGM0P25 = (1000 gram)^0.25 / (86400 second);
  unit PER_DAY = 1 / (86400 second);
  unit MicroGM_PER_DAY = 1e-6 gram / (86400 second);
  unit L_PER_DAY = litre / (86400 second);
end
